9# -*- coding: utf-8 -*-

import Sofa

import SofaRuntime
SofaRuntime.importPlugin("SofaComponentAll")

R_radial = 3205


# to add elements like Node or objects
import Sofa.Core
root = Sofa.Core.Node()
import math
import numpy as np
from scipy import signal

import os


path = os.path.dirname(os.path.abspath(__file__)) + '/mesh/'


class SpiderController(Sofa.Core.Controller):

	def __init__(self, *args, **kwargs):
		Sofa.Core.Controller.__init__(self,*args, **kwargs) #needed
		self.time = 0.0
		self.node = kwargs['node']
		self.pos_matrix = kwargs['pos_matrix']
		self.pos_filament = kwargs['pos_filament']


	def onAnimateBeginEvent(self,event):
            self.time = self.node.time.value
            self.pos_matrix= self.node.matrix.l_matrix.position.value
            self.pos_filament= self.node.matrix.filament.l_filament.position.value


            ramp_time = 5  # Time for each ramp (up and down)
            forces = np.piecewise(self.time , [self.time  < ramp_time, (ramp_time <= self.time ) & (self.time  <= 2*ramp_time), self.time  > 2*ramp_time],
                     [lambda t: 80000 * t, lambda t: 400000 - 80000 * (t - ramp_time), 0])

            self.node.matrix.FF.force.value = [0,forces,0]


#***********************  hex5  ************************#


            hex_5 = self.pos_filament[18][1] - self.pos_filament[16][1]
            #print("hex_5 is :", hex_5)

            epsilon_5 = ((hex_5 - 16.262718200680013)/16.262718200680013)*100

            r_5 = (R_radial*16.262718200680013/30) /2711.890962292 *( 40.9786262984012 * epsilon_5 + 2711.890962292 )

            #print(r_5)
#***********************  hex6************************#


            hex_6 = self.pos_filament[16][1] - self.pos_filament[17][1]
            #print("hex_6 is :", hex_6)

            epsilon_6 = ((hex_6 - 16.264190673824004)/16.264190673824004)*100

            r_6 = (R_radial*16.264190673824004/30) /2711.890962292 *( 40.9786262984012 * epsilon_6 + 2711.890962292 )
            #print(r_6)

    #***********************  hex7************************#


            hex_7 = self.pos_filament[19][1] - self.pos_filament[17][1]
            #print("hex_7 is :", hex_7)

            epsilon_7 = ((hex_7 - 16.26271820068399)/16.26271820068399)*100

            r_7 = (R_radial*16.26271820068399/30) /2711.890962292 *( 40.9786262984012 * epsilon_7 + 2711.890962292 )

            #print(r_7)

    #***********************  hex8 ************************#


            hex_8 = self.pos_filament[18][1] - self.pos_filament[19][1]
            #print("hex_8 is :", hex_8)

            epsilon_8 = ((hex_8 - 16.264190673820025)/16.264190673820025)*100

            r_8 = (R_radial*16.264190673820025/30)/2711.890962292 *( 40.9786262984012 * epsilon_8 + 2711.890962292 )

            #print(r_8)


    #***********************  hex9 ************************#


            hex_9 = self.pos_filament[482][1] - self.pos_filament[500][1]
            #print("hex_9 is :", hex_9)

            epsilon_9 = ((hex_9 - 13.000335693360014)/13.000335693360014)*100

            r_9 = (R_radial*13.000335693360014/30)/2711.890962292 *( 40.9786262984012 * epsilon_9 + 2711.890962292 )

            #print(r_9)


    #***********************  hex10 ************************#


            hex_10 = self.pos_filament[500][1] - self.pos_filament[478][1]
            #print("hex_10 is :", hex_10)

            epsilon_10 = ((hex_10 - 13.018604278560986)/13.018604278560986)*100

            r_10 = (R_radial*13.018604278560986/30)/2711.890962292 *( 40.9786262984012 * epsilon_10 + 2711.890962292 )

            #print(r_10)


               #***********************  hex11 ************************#


            hex_11 = self.pos_filament[474][0] - self.pos_filament[500][0]
            #print("hex_11 is :", hex_11)

            epsilon_11 = ((hex_11 - 12.998451232910014)/12.998451232910014)*100

            r_11 = (R_radial*12.998451232910014/30)/2711.890962292 *( 40.9786262984012 * epsilon_11 + 2711.890962292 )

            #print(r_11)


               #***********************  hex12 ************************#


            hex_12 = self.pos_filament[500][0] - self.pos_filament[487][0]
            #print("hex_12 is :", hex_12)

            epsilon_12 = ((hex_12 - 13.007423400878992)/13.007423400878992)*100

            r_12 = (R_radial*13.007423400878992/30)/2711.890962292 *( 40.9786262984012 * epsilon_12 + 2711.890962292 )

            #print(r_12)


       ######************ Kirchoff equations ****########
            A = np.zeros((12,12))
            I = np.zeros((12,1))
            C = np.zeros((12,1))
            I[0] = 1

            ### nodes first stage
            A[0][0]= 1;   A[0][4]= -1;     A[0][8] = -1;	A[0][7] = 1;
            A[1][1]= 1;   A[1][5]= -1;	   A[1][10] = -1;	A[1][4] = 1;
            A[2][2]= 1;   A[2][6]= -1;	   A[2][9] = -1;	A[2][5] = 1;
            A[3][3]= 1;   A[3][7]= -1;	   A[3][11] = -1;	A[3][6] = 1;


            #### loop first stage  ############ check
            A[4][4]=r5 ;    A[4][10]=r11;   A[4][8] = -r9;
            A[5][5]=r6 ;    A[5][10]=r11;   A[5][9] = -r10;
            A[6][6]=r7 ;    A[6][9]=-r10;   A[6][11] = r12;
            A[7][7]=r8;    A[7][8]=-r9;   A[7][11] = r12;


########### Boundary Conditions 1 and 3 main radial ##############

            A[8][0] = 1 ;  C[8][0] = 1;
            A[10][1] = 1 ;  C[10][0] = 0;
            A[9][2] = 1 ;  C[9][0] = -1;
            A[11][3] = 1 ;  C[11][0] = 0;


               ## Solve the matrix equation
            I = solve(A, C)

################# Check whether the solution is correct ################
            #print(np.allclose(np.dot(A,I),C))

###### Access the solution######
#####  I[7] is I_6 ########

            V = r5 * I[4] + r6 * I[5]
            R_t13 = V;
            print(R_t13)


# #######***********************  matrix strain   ************************#


            matrix_length = self.pos_matrix[1][1] - self.pos_matrix[6][1]
            #print(" matrix_length is :",   matrix_length)


 #######***********************  part1  segments   ************************#
            matrix_1 = self.pos_matrix[267][1] - self.pos_matrix[4][1]

            #print("matrix_1", matrix_1 )

            matrix_epsilon_1 = ((matrix_1 - 20.104896677387785)/20.104896677387785) * 100
            #print("matrix_epsilon_1", matrix_epsilon_1)


            #######***********************  part2  segments   ************************#
            matrix_2 = self.pos_matrix[215][1] - self.pos_matrix[267][1]

            #print("matrix_2", matrix_2 )

            matrix_epsilon_2 = ((matrix_2 - 20.441054740343915 )/20.441054740343915) * 100

            #print("matrix_epsilon_2", matrix_epsilon_2)

            #######***********************  part3  segments   ************************#
            matrix_3 = self.pos_matrix[147][1] - self.pos_matrix[215][1]

            #print("matrix_3", matrix_3 )

            matrix_epsilon_3 = ((matrix_3 - 20.56515969337761 )/20.56515969337761) * 100
            #print("matrix_epsilon_3", matrix_epsilon_3)

            #######***********************  part4  segments   ************************#
            matrix_4 = self.pos_matrix[221][1] - self.pos_matrix[147][1]

            #print("matrix_4", matrix_4)

            matrix_epsilon_4 = ((matrix_4 - 20.901317756333697 )/20.901317756333697) * 100
            #print("matrix_epsilon_4", matrix_epsilon_4)

            #######***********************  part5  segments   ************************#
            matrix_5 = self.pos_matrix[0][1] - self.pos_matrix[286][1]

            #print("matrix_5", matrix_5 )

            matrix_epsilon_5 = ((matrix_5 - 20.104896677387785 )/20.104896677387785) * 100
            #print("matrix_epsilon_5", matrix_epsilon_5)

            matrix_ep = (((matrix_1 - 20.104896677387785) + (matrix_2 - 20.441054740343915 ) + (matrix_3 - 20.56515969337761 ) + (matrix_4 - 20.901317756333697 ) + (matrix_5 - 20.104896677387785 ))/ (20.104896677387785 + 20.441054740343915 + 20.56515969337761 + 20.901317756333697 + 20.104896677387785)) * 100
            #print(matrix_ep)


def createScene(rootNode):
    rootNode.addObject('RequiredPlugin', name='SoftRobots')
    rootNode.addObject('RequiredPlugin', name='SofaPython3')
    rootNode.addObject('RequiredPlugin', name='Sofa.Component.StateContainer')

    rootNode.addObject('RequiredPlugin', name='Sofa.Component.Constraint.Projective') # Needed to use components [FixedConstraint]
    rootNode.addObject('RequiredPlugin', name='Sofa.Component.Mapping.Linear') # Needed to use components [BarycentricMapping]

    rootNode.addObject('RequiredPlugin', name='Sofa.Component.MechanicalLoad') # Needed to use components [ConstantForceField]


    rootNode.addObject('RequiredPlugin', pluginName=[
        "Sofa.Component.AnimationLoop",  # Needed to use components FreeMotionAnimationLoop
        "Sofa.Component.Constraint.Lagrangian.Correction",
        # Needed to use components LinearSolverConstraintCorrection
        "Sofa.Component.Constraint.Lagrangian.Solver",  # Needed to use components GenericConstraintSolver
        "Sofa.Component.Engine.Select",  # Needed to use components BoxROI
        "Sofa.Component.IO.Mesh",  # Needed to use components MeshSTLLoader, MeshVTKLoader
        "Sofa.Component.LinearSolver.Direct",  # Needed to use components SparseLDLSolver
        "Sofa.Component.Mass",  # Needed to use components UniformMass
        "Sofa.Component.ODESolver.Backward",  # Needed to use components EulerImplicitSolver
        "Sofa.Component.Setting",  # Needed to use components BackgroundSetting
        "Sofa.Component.SolidMechanics.FEM.Elastic",  # Needed to use components TetrahedronFEMForceField
        "Sofa.Component.SolidMechanics.Spring",  # Needed to use components RestShapeSpringsForceField
        "Sofa.Component.Topology.Container.Constant",  # Needed to use components MeshTopology
        "Sofa.Component.Visual",  # Needed to use components VisualStyle
        "Sofa.GL.Component.Rendering3D",  # Needed to use components OglModel
    ])
    rootNode.addObject('VisualStyle', displayFlags="showVisualModels hideBehaviorModels hideCollisionModels \
                        hideBoundingCollisionModels hideForceFields showInteractionForceFields hideWireframe")

    rootNode.addObject('FreeMotionAnimationLoop')
    rootNode.addObject('RequiredPlugin', name='Sofa.Component.Collision.Geometry')
    rootNode.addObject('DefaultVisualManagerLoop')

    rootNode.addObject('GenericConstraintSolver', maxIterations=1000, tolerance=1e-3)

    #rootNode.addObject('BackgroundSetting', color=[0, 0.168627, 0.211765, 1])
    rootNode.addObject('BackgroundSetting', color=[0, 0, 0, 0])
    #rootNode.findData('gravity').value = [0, 0, -981.0]
    rootNode.findData('gravity').value = [0, 0, -9.81]


    rootNode.findData('dt').value = 0.01


    ##########################################
    # python script controller to control tensile force
    ##########################################

    #rootNode.createObject('PythonScriptController', classname="controller", filename="force_controller.py")


  ##########################################
    # FEM Model                              #
    ##########################################
    matrix = rootNode.addChild('matrix')
    matrix.addObject('EulerImplicitSolver', firstOrder=False, rayleighStiffness=0.2, rayleighMass=0.2)
    matrix.addObject('SparseLDLSolver')

    matrix.addObject('MeshVTKLoader', name='loader', filename=path + 'rectangle.vtk', rotation=[0, 0, 0])
    matrix.addObject('MeshTopology', src='@loader')

    matrix.addObject('MechanicalObject', name='l_matrix', template='Vec3')
    matrix.addObject('UniformMass', totalMass=1)
    matrix.addObject('TetrahedronFEMForceField', template='Vec3', name='FEM', method='large', poissonRatio=0.4,
                        youngModulus=0.6e6)

    matrix.addObject('FixedConstraint', indices="5 66 152 815 78 152 153 875 76 162 971 81 161 162 901 82 160 161 924 73 159 160 924 72 158 159 888 85 86 157 566 68 154 155 878 7 89 154 826")


    matrix.addObject('ConstantForceField',name='FF', indices= "  0 31 124 824 8 124 125 876 10 125 128 252 11 12 130 254 13 129 132 255 14 15 131 927 16 133 134 841 18 126 127 818 1 19 126 818", force =[0, 0, 0], showArrowSize = "0.00003")


    matrix.addObject('LinearSolverConstraintCorrection')


   ############################  strain control ########################

   #matrix.addObject('PositionConstraint', indices= "725 806 974 599 627 911 1125 505 519 832 1003 520 541 662 1039 466 581 644 734 892 951 960 1232 1449 1458 1462 224 296 462 541 154 156 393 540",valueType="displacement", value=50, useDirections=[0, 1, 0])


     # matrix visualization
    ##########################################
    # In Sofa, visualization is handled by adding a rendering model.
    #  Create an empty child node to store this rendering model.
    matrixVisu = matrix.addChild('visu0')

    # Add to this empty node a rendering model made of triangles and loaded from a stl file.
    matrixVisu.addObject('MeshSTLLoader', filename=path + "rectangle.stl", name="loader")
    matrixVisu.addObject('OglModel', src="@loader",  color=[0.9, 0.9, 0.9, 0.5])

    # Add a BarycentricMapping to deform the rendering model in a way that follow the ones of the parent mechanical model.
    matrixVisu.addObject('TriangleCollisionModel')
    matrixVisu.addObject('LineCollisionModel')
    matrixVisu.addObject('PointCollisionModel')

    matrixVisu.addObject('BarycentricMapping')


     ##########################################
    # filament                           #
    ##########################################
    #  This add a new node in the scene. This node is appended to the matrix's node.
    filament = matrix.addChild('filament')
    filament.addObject('EulerImplicitSolver', firstOrder=False, rayleighStiffness=0.2, rayleighMass=0.2)
    filament.addObject('SparseLDLSolver')
    #  This adds a MechanicalObject, a component holding the degree of freedom of our
    # mechanical modelling. In the case of a pneumatic actuation it is a set of positions describing the spider wall.
    filament.addObject('MeshVTKLoader', name='loader', filename=path + 'hex0.vtk', rotation=[0, 0, 0])
    filament.addObject('MeshTopology', src='@loader', name='topo')
    filament.addObject('MechanicalObject', name='l_filament')
    filament.addObject('TetrahedronFEMForceField', template='Vec3', name='FEM', method='large', poissonRatio=0.4,
                        youngModulus=9e6)
    filament.addObject('UniformMass', totalMass=0.003)
    #filament.addObject('LinearSolverConstraintCorrection')


    # This adds a BarycentricMapping. A BarycentricMapping is a key element as it will add a bi-directional link
    #  between the spider wall (surfacic mesh) and the matrix (volumetric mesh) so that movements of the spider's DoFs will be mapped
    #  to the matrix and vice-versa;
    filament.addObject('BarycentricMapping', name='mapping', mapForces=False, mapMasses=False)
    filament.addObject(SpiderController(node=rootNode, pos_matrix = rootNode.matrix.l_matrix.position.value,  pos_filament = rootNode.matrix.filament.l_filament.position.value))

    ##########################################
    # filament Visualization
    ##########################################
    filamentVisu = filament.addChild('visu1')
    filamentVisu.addObject('MeshSTLLoader', filename=path + "hex0.stl", name="loader")
    filamentVisu.addObject('OglModel', src="@loader", color=[0.1, 0.1, 0.1, 0.9])

    filamentVisu.addObject('TriangleCollisionModel')
    filamentVisu.addObject('LineCollisionModel')
    filamentVisu.addObject('PointCollisionModel')

    filamentVisu.addObject('BarycentricMapping')


    return rootNode

9# -*- coding: utf-8 -*-

import Sofa

import SofaRuntime
SofaRuntime.importPlugin("SofaComponentAll")

R_radial = 3205


# to add elements like Node or objects
import Sofa.Core
root = Sofa.Core.Node()
import math
import numpy as np
from scipy import signal

import os


path = os.path.dirname(os.path.abspath(__file__)) + '/mesh/'


class SpiderController(Sofa.Core.Controller):

	def __init__(self, *args, **kwargs):
		Sofa.Core.Controller.__init__(self,*args, **kwargs) #needed
		self.time = 0.0
		self.node = kwargs['node']
		self.pos_matrix = kwargs['pos_matrix']
		self.pos_filament = kwargs['pos_filament']


	def onAnimateBeginEvent(self,event):
            self.time = self.node.time.value
            self.pos_matrix= self.node.matrix.l_matrix.position.value
            self.pos_filament= self.node.matrix.filament.l_filament.position.value


            ramp_time = 5  # Time for each ramp (up and down)
            forces = np.piecewise(self.time , [self.time  < ramp_time, (ramp_time <= self.time ) & (self.time  <= 2*ramp_time), self.time  > 2*ramp_time],
                     [lambda t: 80000 * t, lambda t: 400000 - 80000 * (t - ramp_time), 0])

            self.node.matrix.FF.force.value = [0,forces,0]


#***********************  hex5  ************************#


            hex_5 = self.pos_filament[18][1] - self.pos_filament[16][1]
            #print("hex_5 is :", hex_5)

            epsilon_5 = ((hex_5 - 16.262718200680013)/16.262718200680013)*100

            r_5 = (R_radial*16.262718200680013/30) /2711.890962292 *( 40.9786262984012 * epsilon_5 + 2711.890962292 )

            #print(r_5)
#***********************  hex6************************#


            hex_6 = self.pos_filament[16][1] - self.pos_filament[17][1]
            #print("hex_6 is :", hex_6)

            epsilon_6 = ((hex_6 - 16.264190673824004)/16.264190673824004)*100

            r_6 = (R_radial*16.264190673824004/30) /2711.890962292 *( 40.9786262984012 * epsilon_6 + 2711.890962292 )
            #print(r_6)

    #***********************  hex7************************#


            hex_7 = self.pos_filament[19][1] - self.pos_filament[17][1]
            #print("hex_7 is :", hex_7)

            epsilon_7 = ((hex_7 - 16.26271820068399)/16.26271820068399)*100

            r_7 = (R_radial*16.26271820068399/30) /2711.890962292 *( 40.9786262984012 * epsilon_7 + 2711.890962292 )

            #print(r_7)

    #***********************  hex8 ************************#


            hex_8 = self.pos_filament[18][1] - self.pos_filament[19][1]
            #print("hex_8 is :", hex_8)

            epsilon_8 = ((hex_8 - 16.264190673820025)/16.264190673820025)*100

            r_8 = (R_radial*16.264190673820025/30)/2711.890962292 *( 40.9786262984012 * epsilon_8 + 2711.890962292 )

            #print(r_8)


    #***********************  hex9 ************************#


            hex_9 = self.pos_filament[482][1] - self.pos_filament[500][1]
            #print("hex_9 is :", hex_9)

            epsilon_9 = ((hex_9 - 13.000335693360014)/13.000335693360014)*100

            r_9 = (R_radial*13.000335693360014/30)/2711.890962292 *( 40.9786262984012 * epsilon_9 + 2711.890962292 )

            #print(r_9)


    #***********************  hex10 ************************#


            hex_10 = self.pos_filament[500][1] - self.pos_filament[478][1]
            #print("hex_10 is :", hex_10)

            epsilon_10 = ((hex_10 - 13.018604278560986)/13.018604278560986)*100

            r_10 = (R_radial*13.018604278560986/30)/2711.890962292 *( 40.9786262984012 * epsilon_10 + 2711.890962292 )

            #print(r_10)


               #***********************  hex11 ************************#


            hex_11 = self.pos_filament[474][0] - self.pos_filament[500][0]
            #print("hex_11 is :", hex_11)

            epsilon_11 = ((hex_11 - 12.998451232910014)/12.998451232910014)*100

            r_11 = (R_radial*12.998451232910014/30)/2711.890962292 *( 40.9786262984012 * epsilon_11 + 2711.890962292 )

            #print(r_11)


               #***********************  hex12 ************************#


            hex_12 = self.pos_filament[500][0] - self.pos_filament[487][0]
            #print("hex_12 is :", hex_12)

            epsilon_12 = ((hex_12 - 13.007423400878992)/13.007423400878992)*100

            r_12 = (R_radial*13.007423400878992/30)/2711.890962292 *( 40.9786262984012 * epsilon_12 + 2711.890962292 )

            #print(r_12)


       ######************ Kirchoff equations ****########
            A = np.zeros((12,12))
            I = np.zeros((12,1))
            C = np.zeros((12,1))
            I[0] = 1

            ### nodes first stage
            A[0][0]= 1;   A[0][4]= -1;     A[0][8] = -1;	A[0][7] = 1;
            A[1][1]= 1;   A[1][5]= -1;	   A[1][10] = -1;	A[1][4] = 1;
            A[2][2]= 1;   A[2][6]= -1;	   A[2][9] = -1;	A[2][5] = 1;
            A[3][3]= 1;   A[3][7]= -1;	   A[3][11] = -1;	A[3][6] = 1;


            #### loop first stage  ############ check
            A[4][4]=r5 ;    A[4][10]=r11;   A[4][8] = -r9;
            A[5][5]=r6 ;    A[5][10]=r11;   A[5][9] = -r10;
            A[6][6]=r7 ;    A[6][9]=-r10;   A[6][11] = r12;
            A[7][7]=r8;    A[7][8]=-r9;   A[7][11] = r12;


########### Boundary Conditions 1 and 3 main radial ##############

            A[8][0] = 1 ;  C[8][0] = 1;
            A[10][1] = 1 ;  C[10][0] = 0;
            A[9][2] = 1 ;  C[9][0] = -1;
            A[11][3] = 1 ;  C[11][0] = 0;


               ## Solve the matrix equation
            I = solve(A, C)

################# Check whether the solution is correct ################
            #print(np.allclose(np.dot(A,I),C))

###### Access the solution######
#####  I[7] is I_6 ########

            V = r5 * I[4] + r6 * I[5]
            R_t13 = V;
            print(R_t13)


# #######***********************  matrix strain   ************************#


            matrix_length = self.pos_matrix[1][1] - self.pos_matrix[6][1]
            #print(" matrix_length is :",   matrix_length)


 #######***********************  part1  segments   ************************#
            matrix_1 = self.pos_matrix[267][1] - self.pos_matrix[4][1]

            #print("matrix_1", matrix_1 )

            matrix_epsilon_1 = ((matrix_1 - 20.104896677387785)/20.104896677387785) * 100
            #print("matrix_epsilon_1", matrix_epsilon_1)


            #######***********************  part2  segments   ************************#
            matrix_2 = self.pos_matrix[215][1] - self.pos_matrix[267][1]

            #print("matrix_2", matrix_2 )

            matrix_epsilon_2 = ((matrix_2 - 20.441054740343915 )/20.441054740343915) * 100

            #print("matrix_epsilon_2", matrix_epsilon_2)

            #######***********************  part3  segments   ************************#
            matrix_3 = self.pos_matrix[147][1] - self.pos_matrix[215][1]

            #print("matrix_3", matrix_3 )

            matrix_epsilon_3 = ((matrix_3 - 20.56515969337761 )/20.56515969337761) * 100
            #print("matrix_epsilon_3", matrix_epsilon_3)

            #######***********************  part4  segments   ************************#
            matrix_4 = self.pos_matrix[221][1] - self.pos_matrix[147][1]

            #print("matrix_4", matrix_4)

            matrix_epsilon_4 = ((matrix_4 - 20.901317756333697 )/20.901317756333697) * 100
            #print("matrix_epsilon_4", matrix_epsilon_4)

            #######***********************  part5  segments   ************************#
            matrix_5 = self.pos_matrix[0][1] - self.pos_matrix[286][1]

            #print("matrix_5", matrix_5 )

            matrix_epsilon_5 = ((matrix_5 - 20.104896677387785 )/20.104896677387785) * 100
            #print("matrix_epsilon_5", matrix_epsilon_5)

            matrix_ep = (((matrix_1 - 20.104896677387785) + (matrix_2 - 20.441054740343915 ) + (matrix_3 - 20.56515969337761 ) + (matrix_4 - 20.901317756333697 ) + (matrix_5 - 20.104896677387785 ))/ (20.104896677387785 + 20.441054740343915 + 20.56515969337761 + 20.901317756333697 + 20.104896677387785)) * 100
            #print(matrix_ep)


def createScene(rootNode):
    rootNode.addObject('RequiredPlugin', name='SoftRobots')
    rootNode.addObject('RequiredPlugin', name='SofaPython3')
    rootNode.addObject('RequiredPlugin', name='Sofa.Component.StateContainer')

    rootNode.addObject('RequiredPlugin', name='Sofa.Component.Constraint.Projective') # Needed to use components [FixedConstraint]
    rootNode.addObject('RequiredPlugin', name='Sofa.Component.Mapping.Linear') # Needed to use components [BarycentricMapping]

    rootNode.addObject('RequiredPlugin', name='Sofa.Component.MechanicalLoad') # Needed to use components [ConstantForceField]


    rootNode.addObject('RequiredPlugin', pluginName=[
        "Sofa.Component.AnimationLoop",  # Needed to use components FreeMotionAnimationLoop
        "Sofa.Component.Constraint.Lagrangian.Correction",
        # Needed to use components LinearSolverConstraintCorrection
        "Sofa.Component.Constraint.Lagrangian.Solver",  # Needed to use components GenericConstraintSolver
        "Sofa.Component.Engine.Select",  # Needed to use components BoxROI
        "Sofa.Component.IO.Mesh",  # Needed to use components MeshSTLLoader, MeshVTKLoader
        "Sofa.Component.LinearSolver.Direct",  # Needed to use components SparseLDLSolver
        "Sofa.Component.Mass",  # Needed to use components UniformMass
        "Sofa.Component.ODESolver.Backward",  # Needed to use components EulerImplicitSolver
        "Sofa.Component.Setting",  # Needed to use components BackgroundSetting
        "Sofa.Component.SolidMechanics.FEM.Elastic",  # Needed to use components TetrahedronFEMForceField
        "Sofa.Component.SolidMechanics.Spring",  # Needed to use components RestShapeSpringsForceField
        "Sofa.Component.Topology.Container.Constant",  # Needed to use components MeshTopology
        "Sofa.Component.Visual",  # Needed to use components VisualStyle
        "Sofa.GL.Component.Rendering3D",  # Needed to use components OglModel
    ])
    rootNode.addObject('VisualStyle', displayFlags="showVisualModels hideBehaviorModels hideCollisionModels \
                        hideBoundingCollisionModels hideForceFields showInteractionForceFields hideWireframe")

    rootNode.addObject('FreeMotionAnimationLoop')
    rootNode.addObject('RequiredPlugin', name='Sofa.Component.Collision.Geometry')
    rootNode.addObject('DefaultVisualManagerLoop')

    rootNode.addObject('GenericConstraintSolver', maxIterations=1000, tolerance=1e-3)

    #rootNode.addObject('BackgroundSetting', color=[0, 0.168627, 0.211765, 1])
    rootNode.addObject('BackgroundSetting', color=[0, 0, 0, 0])
    #rootNode.findData('gravity').value = [0, 0, -981.0]
    rootNode.findData('gravity').value = [0, 0, -9.81]


    rootNode.findData('dt').value = 0.01


    ##########################################
    # python script controller to control tensile force
    ##########################################

    #rootNode.createObject('PythonScriptController', classname="controller", filename="force_controller.py")


  ##########################################
    # FEM Model                              #
    ##########################################
    matrix = rootNode.addChild('matrix')
    matrix.addObject('EulerImplicitSolver', firstOrder=False, rayleighStiffness=0.2, rayleighMass=0.2)
    matrix.addObject('SparseLDLSolver')

    matrix.addObject('MeshVTKLoader', name='loader', filename=path + 'rectangle.vtk', rotation=[0, 0, 0])
    matrix.addObject('MeshTopology', src='@loader')

    matrix.addObject('MechanicalObject', name='l_matrix', template='Vec3')
    matrix.addObject('UniformMass', totalMass=1)
    matrix.addObject('TetrahedronFEMForceField', template='Vec3', name='FEM', method='large', poissonRatio=0.4,
                        youngModulus=0.6e6)

    matrix.addObject('FixedConstraint', indices="5 66 152 815 78 152 153 875 76 162 971 81 161 162 901 82 160 161 924 73 159 160 924 72 158 159 888 85 86 157 566 68 154 155 878 7 89 154 826")


    matrix.addObject('ConstantForceField',name='FF', indices= "  0 31 124 824 8 124 125 876 10 125 128 252 11 12 130 254 13 129 132 255 14 15 131 927 16 133 134 841 18 126 127 818 1 19 126 818", force =[0, 0, 0], showArrowSize = "0.00003")


    matrix.addObject('LinearSolverConstraintCorrection')


   ############################  strain control ########################

   #matrix.addObject('PositionConstraint', indices= "725 806 974 599 627 911 1125 505 519 832 1003 520 541 662 1039 466 581 644 734 892 951 960 1232 1449 1458 1462 224 296 462 541 154 156 393 540",valueType="displacement", value=50, useDirections=[0, 1, 0])


     # matrix visualization
    ##########################################
    # In Sofa, visualization is handled by adding a rendering model.
    #  Create an empty child node to store this rendering model.
    matrixVisu = matrix.addChild('visu0')

    # Add to this empty node a rendering model made of triangles and loaded from a stl file.
    matrixVisu.addObject('MeshSTLLoader', filename=path + "rectangle.stl", name="loader")
    matrixVisu.addObject('OglModel', src="@loader",  color=[0.9, 0.9, 0.9, 0.5])

    # Add a BarycentricMapping to deform the rendering model in a way that follow the ones of the parent mechanical model.
    matrixVisu.addObject('TriangleCollisionModel')
    matrixVisu.addObject('LineCollisionModel')
    matrixVisu.addObject('PointCollisionModel')

    matrixVisu.addObject('BarycentricMapping')


     ##########################################
    # filament                           #
    ##########################################
    #  This add a new node in the scene. This node is appended to the matrix's node.
    filament = matrix.addChild('filament')
    filament.addObject('EulerImplicitSolver', firstOrder=False, rayleighStiffness=0.2, rayleighMass=0.2)
    filament.addObject('SparseLDLSolver')
    #  This adds a MechanicalObject, a component holding the degree of freedom of our
    # mechanical modelling. In the case of a pneumatic actuation it is a set of positions describing the spider wall.
    filament.addObject('MeshVTKLoader', name='loader', filename=path + 'hex0.vtk', rotation=[0, 0, 0])
    filament.addObject('MeshTopology', src='@loader', name='topo')
    filament.addObject('MechanicalObject', name='l_filament')
    filament.addObject('TetrahedronFEMForceField', template='Vec3', name='FEM', method='large', poissonRatio=0.4,
                        youngModulus=9e6)
    filament.addObject('UniformMass', totalMass=0.003)
    #filament.addObject('LinearSolverConstraintCorrection')


    # This adds a BarycentricMapping. A BarycentricMapping is a key element as it will add a bi-directional link
    #  between the spider wall (surfacic mesh) and the matrix (volumetric mesh) so that movements of the spider's DoFs will be mapped
    #  to the matrix and vice-versa;
    filament.addObject('BarycentricMapping', name='mapping', mapForces=False, mapMasses=False)
    filament.addObject(SpiderController(node=rootNode, pos_matrix = rootNode.matrix.l_matrix.position.value,  pos_filament = rootNode.matrix.filament.l_filament.position.value))

    ##########################################
    # filament Visualization
    ##########################################
    filamentVisu = filament.addChild('visu1')
    filamentVisu.addObject('MeshSTLLoader', filename=path + "hex0.stl", name="loader")
    filamentVisu.addObject('OglModel', src="@loader", color=[0.1, 0.1, 0.1, 0.9])

    filamentVisu.addObject('TriangleCollisionModel')
    filamentVisu.addObject('LineCollisionModel')
    filamentVisu.addObject('PointCollisionModel')

    filamentVisu.addObject('BarycentricMapping')


    return rootNode
