9# -*- coding: utf-8 -*-

import Sofa

import SofaRuntime
SofaRuntime.importPlugin("SofaComponentAll")

R_radial = 3205


# to add elements like Node or objects
import Sofa.Core
root = Sofa.Core.Node()
import math
import numpy as np
from scipy import signal

import os


path = os.path.dirname(os.path.abspath(__file__)) + '/mesh/'


class SpiderController(Sofa.Core.Controller):

	def __init__(self, *args, **kwargs):
		Sofa.Core.Controller.__init__(self,*args, **kwargs) #needed
		self.time = 0.0
		self.node = kwargs['node']
		self.pos_matrix = kwargs['pos_matrix']
		self.pos_filament = kwargs['pos_filament']


	def onAnimateBeginEvent(self,event):
            self.time = self.node.time.value
            self.pos_matrix= self.node.matrix.l_matrix.position.value
            self.pos_filament= self.node.matrix.filament.l_filament.position.value


            ramp_time = 5  # Time for each ramp (up and down)
            forces = np.piecewise(self.time , [self.time  < ramp_time, (ramp_time <= self.time ) & (self.time  <= 2*ramp_time), self.time  > 2*ramp_time],
                     [lambda t: 80000 * t, lambda t: 400000 - 80000 * (t - ramp_time), 0])

            self.node.matrix.FF.force.value = [0,forces,0]


#***********************  hex5  ************************#


            lattice_9 = self.pos_filament[21][1] - self.pos_filament[204][1]
            #print("lattice_9 is :", lattice_9)

            epsilon_9 = ((lattice_9 - 14.999999999996987)/14.999999999996987)*100

            r_9 = (R_radial*14.999999999996987/30) /2711.890962292 *( 40.9786262984012 * epsilon_9 + 2711.890962292 )

            #print(r_5)


#***********************  hex5  ************************#


            lattice_10 = self.pos_filament[204][1] - self.pos_filament[22][1]
            print("lattice_10 is :", lattice_10)

            epsilon_10 = ((lattice_10 - 14.99999999999703)/14.99999999999703)*100

            r_10 = (R_radial*14.99999999999703/30) /2711.890962292 *( 40.9786262984012 * epsilon_10 + 2711.890962292 )

            #print(r_5)

   #***********************  hex5  ************************#


            lattice_11 = self.pos_filament[22][0] - self.pos_filament[234][0]
            #print("lattice_11 is :", lattice_11)

            epsilon_11 = ((lattice_11 - 15.00000190734854)/15.00000190734854)*100

            r_11 = (R_radial*15.00000190734854/30) /2711.890962292 *( 40.9786262984012 * epsilon_11 + 2711.890962292 )

            #print(r_5)

    #***********************  hex5  ************************#


            lattice_12 = self.pos_filament[234][0] - self.pos_filament[23][0]
            #print("lattice_12 is :", lattice_12)

            epsilon_12 = ((lattice_12 - 15.000001907348462)/15.000001907348462)*100

            r_12 = (R_radial*15.000001907348462/30) /2711.890962292 *( 40.9786262984012 * epsilon_12 + 2711.890962292 )

            #print(r_5)


                #***********************  hex5  ************************#


            lattice_13 = self.pos_filament[219][1] - self.pos_filament[23][1]
            #print("lattice_13 is :", lattice_13)

            epsilon_13 = ((lattice_13 - 14.999999999996987)/14.999999999996987)*100

            r_13 = (R_radial*14.999999999996987/30) /2711.890962292 *( 40.9786262984012 * epsilon_13 + 2711.890962292 )

            #print(r_5)


                           #***********************  hex5  ************************#


            lattice_14 = self.pos_filament[20][1] - self.pos_filament[219][1]
            #print("lattice_14 is :", lattice_14)

            epsilon_14 = ((lattice_14 - 14.99999999999703)/14.99999999999703)*100

            r_14 = (R_radial*14.99999999999703/30) /2711.890962292 *( 40.9786262984012 * epsilon_14 + 2711.890962292 )

            #print(r_5)


                           #***********************  hex5  ************************#

            lattice_15 = self.pos_filament[188][0] - self.pos_filament[20][0]
            #print("lattice_15 is :", lattice_15)

            epsilon_15 = ((lattice_15 - 15.000001907348455)/15.000001907348455)*100

            r_15 = (R_radial*15.000001907348455/30) /2711.890962292 *( 40.9786262984012 * epsilon_15 + 2711.890962292 )

            #print(r_5)


        #***********************  hex5  ************************#

            lattice_16 = self.pos_filament[21][0] - self.pos_filament[188][0]
            #print("lattice_16 is :", lattice_16)

            epsilon_16 = ((lattice_16 - 15.00000190734854)/15.00000190734854)*100

            r_16 = (R_radial*15.00000190734854/30) /2711.890962292 *( 40.9786262984012 * epsilon_16 + 2711.890962292 )

            #print(r_5)


        #***********************  hex5  ************************#

            lattice_17 = self.pos_filament[188][1] - self.pos_filament[540][1]
            #print("lattice_17 is :", lattice_17)

            epsilon_17 = ((lattice_17 - 14.959693908689985)/14.959693908689985)*100

            r_17 = (R_radial*14.959693908689985/30) /2711.890962292 *( 40.9786262984012 * epsilon_17 + 2711.890962292 )

            #print(r_5)


        #***********************  hex5  ************************#

            lattice_18 = self.pos_filament[540][1] - self.pos_filament[234][1]
            #print("lattice_18 is :", lattice_18)

            epsilon_18 = ((lattice_18 - 15.040306091304032)/15.040306091304032)*100

            r_18 = (R_radial*15.040306091304032/30) /2711.890962292 *( 40.9786262984012 * epsilon_18 + 2711.890962292 )

            #print(r_5)


        #***********************  hex5  ************************#

            lattice_19 = self.pos_filament[204][0] - self.pos_filament[540][0]
            #print("lattice_19 is :", lattice_19)

            epsilon_19 = ((lattice_19 - 15.121814727783004)/15.121814727783004)*100

            r_19 = (R_radial*15.121814727783004/30) /2711.890962292 *( 40.9786262984012 * epsilon_19 + 2711.890962292 )

            #print(r_5)


        #***********************  hex5  ************************#

            lattice_20 = self.pos_filament[540][0] - self.pos_filament[219][0]
            #print("lattice_20 is :", lattice_20)

            epsilon_20 = ((lattice_20 - 14.878189086913999)/14.878189086913999)*100

            r_20 = (R_radial*14.878189086913999/30) /2711.890962292 *( 40.9786262984012 * epsilon_20 + 2711.890962292 )

            #print(r_5)


       ######************ Kirchoff equations ****########
            A = np.zeros((16,16))
            I = np.zeros((16,1))
            C = np.zeros((16,1))
            I[0] = 1

            ### nodes first stage
            A[0][0]= 1;   A[0][8]= -1;     A[0][6] = -1;
            A[1][1]= 1;   A[1][18]= -1;	   A[1][8] = 1;	    A[1][9] = -1;
            A[2][2]= 1;   A[2][10]= -1;	   A[2][9] = 1;
            A[3][3]= 1;   A[3][10]= 1;	   A[3][11] = -1;	A[3][17] = -1;
            A[4][4]= 1;   A[4][12]= -1;	   A[4][3] = 1;
            A[5][5]= 1;   A[5][12]= 1;	   A[5][13] = -1;	A[5][19] = -1;
            A[6][6]= 1;   A[6][14]= -1;	   A[6][13] = 1;
            A[7][7]= 1;   A[7][15]= -1;	   A[7][16] = -1;	A[7][14] = 1;


            #### loop first stage  ############ check
            A[8][8]=r9 ;    A[8][18]=r19;   A[8][16] = -r17; A[8][15] = -r16;
            A[9][9]=r10 ;    A[9][10]=r11;   A[9][18] = -r19; A[9][17] = -r18;
            A[12][12]=r13 ;    A[12][11]=r12;   A[12][19] = -r20; A[12][17] = -r18;
            A[13][13]=r14 ;    A[13][14]=r15;   A[13][16] = -r17; A[13][19] = -r20;


########### Boundary Conditions 8 and 4 main radial ##############

            A[16][0] = 1 ;  C[16][0] = 1;
            A[17][1] = 1 ;  C[17][0] = -1;
            A[18][2] = 1 ;  C[18][0] = 0;
            A[19][3] = 1 ;  C[19][0] = 0;


                  ## Solve the matrix equation
            I = solve(A, C)

################# Check whether the solution is correct ################
            #print(np.allclose(np.dot(A,I),C))

###### Access the solution######
#####  I[7] is I_6 ########

            V = r16 * I[15] + r9 * I[8] + r10 * I[9] +  r11 * I[10]
            R_t84 = V;
            print(R_t84)

            ########### Boundary Conditions 2 and 6 main radial ##############

            A[16][0] = 1 ;  C[16][0] = 0;
            A[17][1] = 1 ;  C[17][0] = 0;
            A[18][2] = 1 ;  C[18][0] = 1;
            A[19][3] = 1 ;  C[19][0] = -1;


            V = r9 * I[8] + r16 * I[15] + r15 * I[14] +  r14 * I[13]
            R_t26 = V;
            print(R_t26)


# #######***********************  matrix strain   ************************#


            matrix_length = self.pos_matrix[1][1] - self.pos_matrix[6][1]
            #print(" matrix_length is :",   matrix_length)


 #######***********************  part1  segments   ************************#
            matrix_1 = self.pos_matrix[267][1] - self.pos_matrix[4][1]

            #print("matrix_1", matrix_1 )

            matrix_epsilon_1 = ((matrix_1 - 20.104896677387785)/20.104896677387785) * 100
            #print("matrix_epsilon_1", matrix_epsilon_1)


            #######***********************  part2  segments   ************************#
            matrix_2 = self.pos_matrix[215][1] - self.pos_matrix[267][1]

            #print("matrix_2", matrix_2 )

            matrix_epsilon_2 = ((matrix_2 - 20.441054740343915 )/20.441054740343915) * 100

            #print("matrix_epsilon_2", matrix_epsilon_2)

            #######***********************  part3  segments   ************************#
            matrix_3 = self.pos_matrix[147][1] - self.pos_matrix[215][1]

            #print("matrix_3", matrix_3 )

            matrix_epsilon_3 = ((matrix_3 - 20.56515969337761 )/20.56515969337761) * 100
            #print("matrix_epsilon_3", matrix_epsilon_3)

            #######***********************  part4  segments   ************************#
            matrix_4 = self.pos_matrix[221][1] - self.pos_matrix[147][1]

            #print("matrix_4", matrix_4)

            matrix_epsilon_4 = ((matrix_4 - 20.901317756333697 )/20.901317756333697) * 100
            #print("matrix_epsilon_4", matrix_epsilon_4)

            #######***********************  part5  segments   ************************#
            matrix_5 = self.pos_matrix[0][1] - self.pos_matrix[286][1]

            #print("matrix_5", matrix_5 )

            matrix_epsilon_5 = ((matrix_5 - 20.104896677387785 )/20.104896677387785) * 100
            #print("matrix_epsilon_5", matrix_epsilon_5)

            matrix_ep = (((matrix_1 - 20.104896677387785) + (matrix_2 - 20.441054740343915 ) + (matrix_3 - 20.56515969337761 ) + (matrix_4 - 20.901317756333697 ) + (matrix_5 - 20.104896677387785 ))/ (20.104896677387785 + 20.441054740343915 + 20.56515969337761 + 20.901317756333697 + 20.104896677387785)) * 100
            #print(matrix_ep)


def createScene(rootNode):
    rootNode.addObject('RequiredPlugin', name='SoftRobots')
    rootNode.addObject('RequiredPlugin', name='SofaPython3')
    rootNode.addObject('RequiredPlugin', name='Sofa.Component.StateContainer')

    rootNode.addObject('RequiredPlugin', name='Sofa.Component.Constraint.Projective') # Needed to use components [FixedConstraint]
    rootNode.addObject('RequiredPlugin', name='Sofa.Component.Mapping.Linear') # Needed to use components [BarycentricMapping]

    rootNode.addObject('RequiredPlugin', name='Sofa.Component.MechanicalLoad') # Needed to use components [ConstantForceField]


    rootNode.addObject('RequiredPlugin', pluginName=[
        "Sofa.Component.AnimationLoop",  # Needed to use components FreeMotionAnimationLoop
        "Sofa.Component.Constraint.Lagrangian.Correction",
        # Needed to use components LinearSolverConstraintCorrection
        "Sofa.Component.Constraint.Lagrangian.Solver",  # Needed to use components GenericConstraintSolver
        "Sofa.Component.Engine.Select",  # Needed to use components BoxROI
        "Sofa.Component.IO.Mesh",  # Needed to use components MeshSTLLoader, MeshVTKLoader
        "Sofa.Component.LinearSolver.Direct",  # Needed to use components SparseLDLSolver
        "Sofa.Component.Mass",  # Needed to use components UniformMass
        "Sofa.Component.ODESolver.Backward",  # Needed to use components EulerImplicitSolver
        "Sofa.Component.Setting",  # Needed to use components BackgroundSetting
        "Sofa.Component.SolidMechanics.FEM.Elastic",  # Needed to use components TetrahedronFEMForceField
        "Sofa.Component.SolidMechanics.Spring",  # Needed to use components RestShapeSpringsForceField
        "Sofa.Component.Topology.Container.Constant",  # Needed to use components MeshTopology
        "Sofa.Component.Visual",  # Needed to use components VisualStyle
        "Sofa.GL.Component.Rendering3D",  # Needed to use components OglModel
    ])
    rootNode.addObject('VisualStyle', displayFlags="showVisualModels hideBehaviorModels hideCollisionModels \
                        hideBoundingCollisionModels hideForceFields showInteractionForceFields hideWireframe")

    rootNode.addObject('FreeMotionAnimationLoop')
    rootNode.addObject('RequiredPlugin', name='Sofa.Component.Collision.Geometry')
    rootNode.addObject('DefaultVisualManagerLoop')

    rootNode.addObject('GenericConstraintSolver', maxIterations=1000, tolerance=1e-3)

    #rootNode.addObject('BackgroundSetting', color=[0, 0.168627, 0.211765, 1])
    rootNode.addObject('BackgroundSetting', color=[0, 0, 0, 0])
    #rootNode.findData('gravity').value = [0, 0, -981.0]
    rootNode.findData('gravity').value = [0, 0, -9.81]


    rootNode.findData('dt').value = 0.01


    ##########################################
    # python script controller to control tensile force
    ##########################################

    #rootNode.createObject('PythonScriptController', classname="controller", filename="force_controller.py")


  ##########################################
    # FEM Model                              #
    ##########################################
    matrix = rootNode.addChild('matrix')
    matrix.addObject('EulerImplicitSolver', firstOrder=False, rayleighStiffness=0.2, rayleighMass=0.2)
    matrix.addObject('SparseLDLSolver')

    matrix.addObject('MeshVTKLoader', name='loader', filename=path + 'rectangle.vtk', rotation=[0, 0, 0])
    matrix.addObject('MeshTopology', src='@loader')

    matrix.addObject('MechanicalObject', name='l_matrix', template='Vec3')
    matrix.addObject('UniformMass', totalMass=1)
    matrix.addObject('TetrahedronFEMForceField', template='Vec3', name='FEM', method='large', poissonRatio=0.4,
                        youngModulus=0.6e6)

    matrix.addObject('FixedConstraint', indices="5 66 152 815 78 152 153 875 76 162 971 81 161 162 901 82 160 161 924 73 159 160 924 72 158 159 888 85 86 157 566 68 154 155 878 7 89 154 826")


    matrix.addObject('ConstantForceField',name='FF', indices= "  0 31 124 824 8 124 125 876 10 125 128 252 11 12 130 254 13 129 132 255 14 15 131 927 16 133 134 841 18 126 127 818 1 19 126 818", force =[0, 0, 0], showArrowSize = "0.00003")


    matrix.addObject('LinearSolverConstraintCorrection')


   ############################  strain control ########################

   #matrix.addObject('PositionConstraint', indices= "725 806 974 599 627 911 1125 505 519 832 1003 520 541 662 1039 466 581 644 734 892 951 960 1232 1449 1458 1462 224 296 462 541 154 156 393 540",valueType="displacement", value=50, useDirections=[0, 1, 0])


     # matrix visualization
    ##########################################
    # In Sofa, visualization is handled by adding a rendering model.
    #  Create an empty child node to store this rendering model.
    matrixVisu = matrix.addChild('visu0')

    # Add to this empty node a rendering model made of triangles and loaded from a stl file.
    matrixVisu.addObject('MeshSTLLoader', filename=path + "rectangle.stl", name="loader")
    matrixVisu.addObject('OglModel', src="@loader",  color=[0.9, 0.9, 0.9, 0.5])

    # Add a BarycentricMapping to deform the rendering model in a way that follow the ones of the parent mechanical model.
    matrixVisu.addObject('TriangleCollisionModel')
    matrixVisu.addObject('LineCollisionModel')
    matrixVisu.addObject('PointCollisionModel')

    matrixVisu.addObject('BarycentricMapping')


     ##########################################
    # filament                           #
    ##########################################
    #  This add a new node in the scene. This node is appended to the matrix's node.
    filament = matrix.addChild('filament')
    filament.addObject('EulerImplicitSolver', firstOrder=False, rayleighStiffness=0.2, rayleighMass=0.2)
    filament.addObject('SparseLDLSolver')
    #  This adds a MechanicalObject, a component holding the degree of freedom of our
    # mechanical modelling. In the case of a pneumatic actuation it is a set of positions describing the spider wall.
    filament.addObject('MeshVTKLoader', name='loader', filename=path + 'lattice0.vtk', rotation=[0, 0, 0])
    filament.addObject('MeshTopology', src='@loader', name='topo')
    filament.addObject('MechanicalObject', name='l_filament')
    filament.addObject('TetrahedronFEMForceField', template='Vec3', name='FEM', method='large', poissonRatio=0.4,
                        youngModulus=9e6)
    filament.addObject('UniformMass', totalMass=0.003)
    #filament.addObject('LinearSolverConstraintCorrection')


    # This adds a BarycentricMapping. A BarycentricMapping is a key element as it will add a bi-directional link
    #  between the spider wall (surfacic mesh) and the matrix (volumetric mesh) so that movements of the spider's DoFs will be mapped
    #  to the matrix and vice-versa;
    filament.addObject('BarycentricMapping', name='mapping', mapForces=False, mapMasses=False)
    filament.addObject(SpiderController(node=rootNode, pos_matrix = rootNode.matrix.l_matrix.position.value,  pos_filament = rootNode.matrix.filament.l_filament.position.value))

    ##########################################
    # filament Visualization
    ##########################################
    filamentVisu = filament.addChild('visu1')
    filamentVisu.addObject('MeshSTLLoader', filename=path + "lattice0.stl", name="loader")
    filamentVisu.addObject('OglModel', src="@loader", color=[0.1, 0.1, 0.1, 0.9])

    filamentVisu.addObject('TriangleCollisionModel')
    filamentVisu.addObject('LineCollisionModel')
    filamentVisu.addObject('PointCollisionModel')

    filamentVisu.addObject('BarycentricMapping')


    return rootNode
