9# -*- coding: utf-8 -*-

import Sofa

import SofaRuntime
import matplotlib.pyplot as plt

SofaRuntime.importPlugin("SofaComponentAll")

################################ Paramters ##################################
R_spiral = 3205  #one # ohm  r segment =  385 ############################## R/ L = R_seg/ L_seg
R_spiral  = 1731
a= 2
b= 3

spiral_l = 30 # mm
matrix_l = 100 ## mm


# to add elements like Node or objects
import Sofa.Core
root = Sofa.Core.Node()
import math
import numpy as np
from scipy import signal

import os


path = os.path.dirname(os.path.abspath(__file__)) + '/mesh/'


class SpiderController(Sofa.Core.Controller):


	def __init__(self, *args, **kwargs):
		Sofa.Core.Controller.__init__(self,*args, **kwargs) #needed
		self.time = 0.0
		self.node = kwargs['node']
		self.pos_matrix = kwargs['pos_matrix']
		self.pos_spiral = kwargs['pos_spiral']


	def onAnimateBeginEvent(self,event):
            self.time = self.node.time.value
            self.pos_matrix= self.node.matrix.l_matrix.position.value
            self.pos_spiral= self.node.matrix.spiral.l_spiral.position.value


            ramp_time = 5  # Time for each ramp (up and down)
            forces = np.piecewise(self.time , [self.time  < ramp_time, (ramp_time <= self.time ) & (self.time  <= 2*ramp_time), self.time  > 2*ramp_time],
                     [lambda t: 80000 * t, lambda t: 400000 - 80000 * (t - ramp_time), 0])

            self.node.matrix.FF.force.value = [0,forces,0]


#***********************  part1 in spiral  ************************#


            ##### full length part2 ######

            spiral_1 = self.pos_spiral[305][1] - self.pos_spiral[280][1]
            print("spiral_1 is :", spiral_1)

            epsilon_1 = 100*((spiral_1 - 14.260002136222013)/ 14.260002136222013)

            r_1 = R_spiral/2711.890962292 *( 40.9786262984012 * epsilon_1 + 2711.890962292 )

#***********************  part2 in spiral  ************************#

            ##### full length part3 ######

            spiral_2 = self.pos_spiral[175][1] - self.pos_spiral[303][1]
            print("spiral_2 is :", spiral_2)

            epsilon_2 = 100*((spiral_2 - 14.351997375489987)/14.351997375489987)

            r_2 = R_spiral/2711.890962292 *( 40.9786262984012 * epsilon_2 + 2711.890962292 )


#***********************  part3 in spiral  ************************#

            ##### full length part3 ######

            spiral_3 = self.pos_spiral[97][0] - self.pos_spiral[47][0]
            print("spiral_3 is :", spiral_3)

            epsilon_3 = 100*((spiral_3 - 14.506996154785)/14.506996154785)

            r_3 = R_spiral/2711.890962292 *( 40.9786262984012 * epsilon_3 + 2711.890962292 )


#***********************  part4 in spiral  ************************#

            ##### full length part3 ######

            spiral_4 = self.pos_spiral[93][1] - self.pos_spiral[41][1]
            print("spiral_4  is :", spiral_4 )

            epsilon_4 = 100*((spiral_4 - 14.338005065909996 )/14.338005065909996)

            r_4 = R_spiral/2711.890962292 *( 40.9786262984012 * epsilon_4 + 2711.890962292 )


#***********************  part5 in spiral  ************************#

            ##### full length part3 ######

            spiral_5 = self.pos_spiral[40][1] - self.pos_spiral[220][1]
            print("spiral_5 is :", spiral_5)

            epsilon_5 = 100*((spiral_5 - 14.285003662106988 )/14.285003662106988)

            r_4 = R_spiral/2711.890962292 *( 40.9786262984012 * epsilon_5 + 2711.890962292 )


#***********************  part6 in spiral  ************************#


            spiral_6 = self.pos_spiral[219][0] - self.pos_spiral[252][0]
            print("spiral_6 is :", spiral_6)

            epsilon_6 = ((spiral_6 - 14.461002349853004)/14.461002349853004)*100

            r_6 = R_spiral/2711.890962292 *( 40.9786262984012 * epsilon_6 + 2711.890962292 )

            #print(r_6)

# #######***********************  matrix strain   ************************#


            matrix_length = self.pos_matrix[1][1] - self.pos_matrix[6][1]
            #print(" matrix_length is :",   matrix_length)


 #######***********************  part1  segments   ************************#
            matrix_1 = self.pos_matrix[267][1] - self.pos_matrix[4][1]

            #print("matrix_1", matrix_1 )

            matrix_epsilon_1 = ((matrix_1 - 20.104896677387785)/20.104896677387785) * 100
            #print("matrix_epsilon_1", matrix_epsilon_1)


            #######***********************  part2  segments   ************************#
            matrix_2 = self.pos_matrix[215][1] - self.pos_matrix[267][1]

            #print("matrix_2", matrix_2 )

            matrix_epsilon_2 = ((matrix_2 - 20.441054740343915 )/20.441054740343915) * 100

            #print("matrix_epsilon_2", matrix_epsilon_2)

            #######***********************  part3  segments   ************************#
            matrix_3 = self.pos_matrix[147][1] - self.pos_matrix[215][1]

            #print("matrix_3", matrix_3 )

            matrix_epsilon_3 = ((matrix_3 - 20.56515969337761 )/20.56515969337761) * 100
            #print("matrix_epsilon_3", matrix_epsilon_3)

            #######***********************  part4  segments   ************************#
            matrix_4 = self.pos_matrix[221][1] - self.pos_matrix[147][1]

            #print("matrix_4", matrix_4)

            matrix_epsilon_4 = ((matrix_4 - 20.901317756333697 )/20.901317756333697) * 100
            #print("matrix_epsilon_4", matrix_epsilon_4)

            #######***********************  part5  segments   ************************#
            matrix_5 = self.pos_matrix[0][1] - self.pos_matrix[286][1]

            #print("matrix_5", matrix_5 )

            matrix_epsilon_5 = ((matrix_5 - 20.104896677387785 )/20.104896677387785) * 100
            #print("matrix_epsilon_5", matrix_epsilon_5)

            matrix_ep = (((matrix_1 - 20.104896677387785) + (matrix_2 - 20.441054740343915 ) + (matrix_3 - 20.56515969337761 ) + (matrix_4 - 20.901317756333697 ) + (matrix_5 - 20.104896677387785 ))/ (20.104896677387785 + 20.441054740343915 + 20.56515969337761 + 20.901317756333697 + 20.104896677387785)) * 100
            #print(matrix_ep)


def createScene(rootNode):
    rootNode.addObject('RequiredPlugin', name='SoftRobots')
    rootNode.addObject('RequiredPlugin', name='SofaPython3')
    rootNode.addObject('RequiredPlugin', name='Sofa.Component.StateContainer')

    rootNode.addObject('RequiredPlugin', name='Sofa.Component.Constraint.Projective') # Needed to use components [FixedConstraint]
    rootNode.addObject('RequiredPlugin', name='Sofa.Component.Mapping.Linear') # Needed to use components [BarycentricMapping]

    rootNode.addObject('RequiredPlugin', name='Sofa.Component.MechanicalLoad') # Needed to use components [ConstantForceField]


    rootNode.addObject('RequiredPlugin', pluginName=[
        "Sofa.Component.AnimationLoop",  # Needed to use components FreeMotionAnimationLoop
        "Sofa.Component.Constraint.Lagrangian.Correction",
        # Needed to use components LinearSolverConstraintCorrection
        "Sofa.Component.Constraint.Lagrangian.Solver",  # Needed to use components GenericConstraintSolver
        "Sofa.Component.Engine.Select",  # Needed to use components BoxROI
        "Sofa.Component.IO.Mesh",  # Needed to use components MeshSTLLoader, MeshVTKLoader
        "Sofa.Component.LinearSolver.Direct",  # Needed to use components SparseLDLSolver
        "Sofa.Component.Mass",  # Needed to use components UniformMass
        "Sofa.Component.ODESolver.Backward",  # Needed to use components EulerImplicitSolver
        "Sofa.Component.Setting",  # Needed to use components BackgroundSetting
        "Sofa.Component.SolidMechanics.FEM.Elastic",  # Needed to use components TetrahedronFEMForceField
        "Sofa.Component.SolidMechanics.Spring",  # Needed to use components RestShapeSpringsForceField
        "Sofa.Component.Topology.Container.Constant",  # Needed to use components MeshTopology
        "Sofa.Component.Visual",  # Needed to use components VisualStyle
        "Sofa.GL.Component.Rendering3D",  # Needed to use components OglModel
    ])
    rootNode.addObject('VisualStyle', displayFlags="showVisualModels hideBehaviorModels hideCollisionModels \
                        hideBoundingCollisionModels hideForceFields showInteractionForceFields hideWireframe")

    rootNode.addObject('FreeMotionAnimationLoop')
    rootNode.addObject('RequiredPlugin', name='Sofa.Component.Collision.Geometry')
    rootNode.addObject('DefaultVisualManagerLoop')

    rootNode.addObject('GenericConstraintSolver', maxIterations=1000, tolerance=1e-3)

    #rootNode.addObject('BackgroundSetting', color=[0, 0.168627, 0.211765, 1])
    rootNode.addObject('BackgroundSetting', color=[0, 0, 0, 0])
    #rootNode.findData('gravity').value = [0, 0, -981.0]
    rootNode.findData('gravity').value = [0, 0, -9.81]


    rootNode.findData('dt').value = 0.01


    ##########################################
    # python script controller to control tensile force
    ##########################################

    #rootNode.createObject('PythonScriptController', classname="controller", filename="force_controller.py")


  ##########################################
    # FEM Model                              #
    ##########################################
    matrix = rootNode.addChild('matrix')
    matrix.addObject('EulerImplicitSolver', firstOrder=False, rayleighStiffness=0.2, rayleighMass=0.2)
    matrix.addObject('SparseLDLSolver')

    matrix.addObject('MeshVTKLoader', name='loader', filename=path + 'rectangle.vtk', rotation=[0, 0, 0])
    matrix.addObject('MeshTopology', src='@loader')

    matrix.addObject('MechanicalObject', name='l_matrix', template='Vec3')
    matrix.addObject('UniformMass', totalMass=1)
    matrix.addObject('TetrahedronFEMForceField', template='Vec3', name='FEM', method='large', poissonRatio=0.4,
                        youngModulus=0.6e6)

    matrix.addObject('FixedConstraint', indices="5 66 152 815 78 152 153 875 76 162 971 81 161 162 901 82 160 161 924 73 159 160 924 72 158 159 888 85 86 157 566 68 154 155 878 7 89 154 826")


    matrix.addObject('ConstantForceField',name='FF', indices= "  0 31 124 824 8 124 125 876 10 125 128 252 11 12 130 254 13 129 132 255 14 15 131 927 16 133 134 841 18 126 127 818 1 19 126 818", force =[0, 0, 0], showArrowSize = "0.00003")


    matrix.addObject('LinearSolverConstraintCorrection')


   ############################  strain control ########################

   #matrix.addObject('PositionConstraint', indices= "725 806 974 599 627 911 1125 505 519 832 1003 520 541 662 1039 466 581 644 734 892 951 960 1232 1449 1458 1462 224 296 462 541 154 156 393 540",valueType="displacement", value=50, useDirections=[0, 1, 0])


     # matrix visualization
    ##########################################
    # In Sofa, visualization is handled by adding a rendering model.
    #  Create an empty child node to store this rendering model.
    matrixVisu = matrix.addChild('visu0')

    # Add to this empty node a rendering model made of triangles and loaded from a stl file.
    matrixVisu.addObject('MeshSTLLoader', filename=path + "rectangle.stl", name="loader")
    matrixVisu.addObject('OglModel', src="@loader",  color=[0.9, 0.9, 0.9, 0.5])

    # Add a BarycentricMapping to deform the rendering model in a way that follow the ones of the parent mechanical model.
    matrixVisu.addObject('TriangleCollisionModel')
    matrixVisu.addObject('LineCollisionModel')
    matrixVisu.addObject('PointCollisionModel')

    matrixVisu.addObject('BarycentricMapping')


     ##########################################
    # spiral                           #
    ##########################################
    #  This add a new node in the scene. This node is appended to the matrix's node.
    spiral = matrix.addChild('spiral')
    spiral.addObject('EulerImplicitSolver', firstOrder=False, rayleighStiffness=0.2, rayleighMass=0.2)
    spiral.addObject('SparseLDLSolver')
    #  This adds a MechanicalObject, a component holding the degree of freedom of our
    # mechanical modelling. In the case of a pneumatic actuation it is a set of positions describing the spider wall.
    spiral.addObject('MeshVTKLoader', name='loader', filename=path + 'spiral_rect.vtk', rotation=[0, 0, 0])
    spiral.addObject('MeshTopology', src='@loader', name='topo')
    spiral.addObject('MechanicalObject', name='l_spiral')
    spiral.addObject('TetrahedronFEMForceField', template='Vec3', name='FEM', method='large', poissonRatio=0.4,
                        youngModulus=9e6)
    spiral.addObject('UniformMass', totalMass=0.003)
    #spiral.addObject('LinearSolverConstraintCorrection')


    # This adds a BarycentricMapping. A BarycentricMapping is a key element as it will add a bi-directional link
    #  between the spider wall (surfacic mesh) and the matrix (volumetric mesh) so that movements of the spider's DoFs will be mapped
    #  to the matrix and vice-versa;
    spiral.addObject('BarycentricMapping', name='mapping', mapForces=False, mapMasses=False)
    spiral.addObject(SpiderController(node=rootNode, pos_matrix = rootNode.matrix.l_matrix.position.value,  pos_spiral = rootNode.matrix.spiral.l_spiral.position.value))

    ##########################################
    # spiral Visualization
    ##########################################
    spiralVisu = spiral.addChild('visu1')
    spiralVisu.addObject('MeshSTLLoader', filename=path + "spiral_rect.stl", name="loader")
    spiralVisu.addObject('OglModel', src="@loader", color=[0.1, 0.1, 0.1, 0.9])

    spiralVisu.addObject('TriangleCollisionModel')
    spiralVisu.addObject('LineCollisionModel')
    spiralVisu.addObject('PointCollisionModel')

    spiralVisu.addObject('BarycentricMapping')


    return rootNode
